<?xml version="1.0"?>

<!--
  File:     Lycoming_O-320.xml
  Author:   AeromatiC++ v 3.3.20

  See: http://wiki.flightgear.org/JSBSim_Engines#FGPiston

  Inputs:
    name:           Lycoming_O-320
    type:           Piston Engine
    power:          160.92 hp
-->

<piston_engine name="Lycoming_O-320">
  <minmp unit="INHG">           8.3 </minmp>
  <maxmp unit="INHG">         28.5 </maxmp>
    <displacement unit="IN3"> 320 </displacement>
  <maxhp>        160.00 </maxhp>
  <cycles>         4.0 </cycles>
  <idlerpm>      600 </idlerpm>
  <maxrpm>      2800.0 </maxrpm>
  <maxthrottle>               1.0  </maxthrottle>
  <minthrottle>               0.1  </minthrottle>
  <sparkfaildrop>             0.1 </sparkfaildrop>
  <man-press-lag> 0.1 </man-press-lag>
  <oil-pressure-rpm-max>1210</oil-pressure-rpm-max>
  <starter-torque> 128.736 </starter-torque>
  <starter-rpm> 1400 </starter-rpm>
  <stroke unit="IN">  4.375 </stroke>
  <cylinders>        4  </cylinders>
  <compression-ratio> 7.0 </compression-ratio>
</piston_engine>
